<?xml version="1.0"?>

<!--
  File:     eng_O-200.xml
  Author:   AeromatiC++ v 3.3.10

  See: http://wiki.flightgear.org/JSBSim_Engines#FGPiston

  Inputs:
    name:           eng_O-200
    type:           Piston Engine
    power:          100 hp
-->

<piston_engine name="eng_O-200">
  <minmp unit="INHG">         10.0 </minmp>
  <maxmp unit="INHG">         28.5 </maxmp>
    <displacement unit="IN3"> 201 </displacement>
  <maxhp>        100 </maxhp>
  <cycles>         4.0 </cycles>
  <idlerpm>      700.0 </idlerpm>
  <maxrpm>      2800.0 </maxrpm>
  <sparkfaildrop>  0.1 </sparkfaildrop>
  <volumetric-efficiency> 0.85 </volumetric-efficiency>
  <man-press-lag> 0.1 </man-press-lag>
  <static-friction  unit="HP"> 0.5 </static-friction>
  <starter-torque> 80 </starter-torque>
  <starter-rpm> 1400 </starter-rpm>
 <!-- Defining <bsfc> over-rides the built-in horsepower calculations -->
 <!--<bsfc>           0.45 </bsfc>-->
  <stroke unit="IN"> 3.875 </stroke>
  <bore unit="IN">    4.166 </bore>
  <cylinders>         4  </cylinders>
  <compression-ratio>  7.0 </compression-ratio>
</piston_engine>
